<?xml version="1.0"?>
<!-- Generated by Aero-Matic v 0.7
     Date: 2 September 2012
     Version : 2.01.

     Inputs:
       horsepower:   2800
       pitch:        variable

     Outputs:
       linear-blade-inches: 280.44963897285


    References :
    ==========
    - http://www.airweb.faa.gov/Regulatory_and_Guidance_Library/rgMakeModel.nsf/MainFrame?OpenFrameSet
    (FAA certificate, 6a5 - 14 may 1952) :

    Gear ratio 16:7.

    Engine limits, low impeller ratio 6.46:1 :
          * maximum continuous :   46.0 in. hg. 2600 rpm (2400 hp) at 5300 ft,
                                   48.0 in. hg. 2600 rpm (2400 hp) at sea level.
          * take-off (2 minutes) : 52.5 in. hg. 2900 rpm (2800 hp) at 4500 ft,
                                   54.5 in. hg. 2900 rpm (2800 hp) at sea level.

                   high impeller ratio 8.67:1 :
          * maximum continuous : 46.0 in. hg. 2600 rpm (2000 hp) at 16000 ft,
                                 47.5 in. hg. 2600 rpm (2000 hp) at 10800 ft.

    Propeller : Hamilton standard hubs 43E60, blades 6901-02, diameter 15'1-5/16" maximum
                14'9-3/16" minimum (2281 lb).


    J above 1.0 :
    ===========
    - http://naca.larc.nasa.gov/reports/1938/naca-report-640/ :
      The aerodynamics characteristics of full-scale propellers having 2, 3, and 4 blades of Clark Y and R.A.F. 6
      airfoil sections, Edwin P. Hartman and David Biermann, NACA 640, 1938.

    - http://naca.larc.nasa.gov/reports/1953/naca-tn-2966/ :
      Propeller-performance charts for transport airplanes, Jean Gilman, NACA 2966, July 1953.

    - http://naca.larc.nasa.gov/reports/1954/naca-tn-3228/ :
      Aerodynamic investigation of a four-blade propeller operating through an angle of attack range from 0 to 180 deg,
      H. Clyde McLemore and Michael D. Cannon, NACA 3228, June 1954.

-->

<!-- Gear ratio 1.0 :
     ==============

     propeller 15 ft : multiply the moment by 2.4 ^2 = 180/75 ^2 : Ixx = 21.8365.


     Gear ratio 16/7 :
     ===============

     divide min/max rpm (700/2900) by the gear ratio 2.286.

     Method :
     ......
     - find thrust multiplier (X 2.3) for takeoff/landing (min pitch, max mixture, full throttle, 2900 RPM).
     - spread the max pitch to 2.0, to reduce thrust at landing (max pitch).
     - lower multiplier (X 1.0) above 0.5 (min pitch), to reduce thrust at landing (J = 0.75, min pitch).
     - find thrust multiplier (X 6.0) to reach the cruise speed (highest pitch, lowest mixture, not idle, 2600 RPM).
     - patch this multiplier above 1.4, to get enough power in cruise (J = 1.8).
     - spread the max pitch until 2.8, if max RPM is beyond 2900 in cruise; which increases the available thrust,
     and throttle becomes higher before bumping into 2600 RPM.

-->

<propeller name="Hamilton Standard 43E60-6901A">

  <ixx> 21.8365 </ixx>                                                 <!-- aeromatic 3.7910590942383 -->
  <diameter unit="IN"> 180 </diameter>                                 <!-- aeromatic 75 -->
  <numblades> 3 </numblades>                                           <!-- aeromatic 4 -->
  <gearratio> 2.286 </gearratio>                                       <!-- aeromatic none (1.0) -->
  <minpitch> 10 </minpitch>
  <maxpitch> 30 </maxpitch>
  <minrpm> 306 </minrpm>
  <maxrpm> 1269 </maxrpm>                                              <!-- aeromatic 2700 -->


<!-- ==== higher power for positiv CDde drag (version 2.0) ==== -->

<!-- multiply by 2.8/0.3-7.0 :
     - cut 10 at 0.5, then patch X 0.3 until 1.0 (deceleration at landing).
     - stretch 30 until 3.0.
     - cut 30 at 1.0, then patch X 7.0 until 3.0.

     Above : 220 kt at 20000 ft (full load), 197 kt at 25000 ft (empty load).
-->

<!--
  <table name="C_THRUST" type="internal">
    <tableData>
       10      30
  0.0  0.20966 0.2621
  0.1  0.20765 0.2609
  0.2  0.20563 0.2596
  0.3  0.20362 0.2583
  0.4  0.18550 0.2570
  0.5  0.16531 0.2558
  0.6  0.01512 0.2545
  0.7  0.01176 0.2432
  0.8  0.00864 0.2318
  0.9  0.00480 0.2192
  1.0  0.00096 0.2066
  1.4  0.00000 0.4410
  1.8  0.00000 0.3430
  2.2  0.00000 0.2520
  2.6  0.00000 0.1400
  3.0  0.00000 0.0280
    </tableData>
  </table>
-->

<!-- multiply by 3.0/0.3-6.0 :
     - cut 10 at 0.5, then patch X 0.3 until 1.0 (deceleration at landing).
     - stretch 30 until 3.0.
     - cut 30 at 1.0, then patch X 6.0 until 3.0.

     Effects :
     - more thrust in cruise (J > 1.0).
     - similar to NACA 640 3 blades.

     Above : 220 kt at 20000 ft (full load).
-->

  <table name="C_THRUST" type="internal">
    <tableData>
       10      30
  0.0  0.22464 0.2808
  0.1  0.22248 0.2795
  0.2  0.22032 0.2781
  0.3  0.21816 0.2768
  0.4  0.19875 0.2754
  0.5  0.17712 0.2741
  0.6  0.01512 0.2727
  0.7  0.01176 0.2432
  0.8  0.00864 0.2484
  0.9  0.00480 0.2192
  1.0  0.00096 0.2214
  1.4  0.00000 0.3780
  1.8  0.00000 0.2940
  2.2  0.00000 0.2160
  2.6  0.00000 0.1200
  3.0  0.00000 0.0240
    </tableData>
  </table>

<!-- multiply by 2.8/0.3-6.0 :
     - cut 10 at 0.5, then patch X 0.3 until 1.0 (deceleration at landing).
     - stretch 30 until 3.0.
     - cut 30 at 1.0, then patch X 6.0 until 3.0.

     Effects :
     - more thrust in cruise (J > 1.0).
     - similar to NACA 640 3 blades.

     Above : 220 kt at 20000 ft (full load).
     Not enough power after takeoff.
-->

<!--
  <table name="C_THRUST" type="internal">
    <tableData>
       10      30
  0.0  0.20966 0.2621
  0.1  0.20765 0.2609
  0.2  0.20563 0.2596
  0.3  0.20362 0.2583
  0.4  0.18550 0.2570
  0.5  0.16531 0.2558
  0.6  0.01512 0.2545
  0.7  0.01176 0.2432
  0.8  0.00864 0.2318
  0.9  0.00480 0.2192
  1.0  0.00096 0.2066
  1.4  0.00000 0.3780
  1.8  0.00000 0.2940
  2.2  0.00000 0.2160
  2.6  0.00000 0.1200
  3.0  0.00000 0.0240
    </tableData>
  </table>
-->

<!-- multiply by 2.8/0.3-6.0 :
     - cut 10 at 0.5, then patch X 0.3 until 1.0 (deceleration at landing).
     - stretch 30 until 2.0.
     - cut 30 at 1.0, then patch X 6.0 until 2.0.

     Cannot reach 220 kt at 20000 ft (full load).
-->

<!--
  <table name="C_THRUST" type="internal">
    <tableData>
       10      30
  0.0  0.20966 0.2621
  0.1  0.20765 0.2609
  0.2  0.20563 0.2596
  0.3  0.20362 0.2583
  0.4  0.18550 0.2570
  0.5  0.16531 0.2558
  0.6  0.01512 0.2545
  0.7  0.01176 0.2432
  0.8  0.00864 0.2318
  0.9  0.00480 0.2192
  1.0  0.00096 0.2066
  1.2  0.00000 0.3780
  1.4  0.00000 0.2940
  1.6  0.00000 0.2160
  1.8  0.00000 0.1200
  2.0  0.00000 0.0240
    </tableData>
  </table>
-->

<!-- multiply by 2.8/0.3-8.0 :
     - cut 10 at 0.5, then patch X 0.3 until 1.0 (deceleration at landing).
     - stretch 30 until 3.0.
     - cut 30 at 1.0, then patch X 8.0 until 3.0.

     Above : 220 kt at 20000 ft (full load), 197 kt at 25000 ft (empty load).
-->

<!--
  <table name="C_THRUST" type="internal">
    <tableData>
       10      30
  0.0  0.20966 0.2621
  0.1  0.20765 0.2609
  0.2  0.20563 0.2596
  0.3  0.20362 0.2583
  0.4  0.18550 0.2570
  0.5  0.16531 0.2558
  0.6  0.01512 0.2545
  0.7  0.01176 0.2432
  0.8  0.00864 0.2318
  0.9  0.00480 0.2192
  1.0  0.00096 0.2066
  1.4  0.00000 0.5040
  1.8  0.00000 0.3920
  2.2  0.00000 0.2880
  2.6  0.00000 0.1600
  3.0  0.00000 0.0320
    </tableData>
  </table>
-->


<!-- multiply by 2.0/3.0 :
     - cut 10 at 1.0.
     - stretch 30 until 2.0.
     - cut 30 at 1.0, then patch X 3.0 until 2.0.

     Effects :
     - reduce the power available at take off (blade 30).
     - narrow below 2900 RPM in cruise (blade 30, J > 1.0), which gives more thrust.
-->

  <table name="C_POWER" type="internal">
    <tableData>
       10      30
  0.0  0.04574 0.20790
  0.1  0.04504 0.20632
  0.2  0.04434 0.20474
  0.3  0.04296 0.20317
  0.4  0.04158 0.20160
  0.5  0.04018 0.19845
  0.6  0.03810 0.19530
  0.7  0.03326 0.19215
  0.8  0.02632 0.18900
  0.9  0.01732 0.18585
  1.0  0.00692 0.18270
  1.2  0.00000 0.25986
  1.4  0.00000 0.22680
  1.6  0.00000 0.17955
  1.8  0.00000 0.11811
  2.0  0.00000 0.04725
    </tableData>
  </table>


<!-- ==== templates ==== -->

<!-- multiply by 1.0, cut 10 at 1.0, stretch 30 to 2.0 (template). -->

<!--
  C_THRUST   16 2
  0.0  0.07488 0.0936
  0.1  0.07416 0.0000
  0.2  0.07344 0.0927
  0.3  0.07272 0.0000
  0.4  0.06625 0.0918
  0.5  0.05904 0.0000
  0.6  0.05040 0.0909
  0.7  0.03920 0.0000
  0.8  0.02880 0.0828
  0.9  0.01600 0.0000
  1.0  0.00320 0.0738
  1.2  0.00000 0.0630
  1.4  0.00000 0.0490
  1.6  0.00000 0.0360
  1.8  0.00000 0.0200
  2.0  0.00000 0.0040
-->

<!-- multiply by 1.0, cut 10 at 1.0, stretch 30 to 2.0 (template). -->

<!--
  C_POWER   16 2
       10      30
  0.0  0.02287 0.10395
  0.1  0.02252 0.10316
  0.2  0.02217 0.10237
  0.3  0.02148 0.10159
  0.4  0.02079 0.10080
  0.5  0.02009 0.09923
  0.6  0.01905 0.09765
  0.7  0.01663 0.09608
  0.8  0.01316 0.09450
  0.9  0.00866 0.09293
  1.0  0.00346 0.09135
  1.2  0.00000 0.08662
  1.4  0.00000 0.07560
  1.6  0.00000 0.05985
  1.8  0.00000 0.03937
  2.0  0.00000 0.01575
-->


<!-- ==== gear ratio 16/7 (version 1.0) ==== -->

<!-- multiply by 2.8/0.3-3.0 :
     - cut 10 at 0.5, then patch X 0.3 until 1.0 (deceleration at landing).
     - split 30 until 1.4, then patch X 3.0 from 1.8 (J = 1.6 in climb, 1.7 in cruise) until 2.0.
     - spread 1.0-2.0 to 1.0-2.8, because max RPM goes beyond 2900.
-->

<!--
  <table name="C_THRUST" type="internal">
    <tableData>
       10      30
  0.0  0.20966 0.2621
  0.1  0.20765 0.2609
  0.2  0.20363 0.2596
  0.3  0.20362 0.2583
  0.4  0.18550 0.2570
  0.5  0.16531 0.2556
  0.6  0.01512 0.2542
  0.7  0.01176 0.2356
  0.8  0.00864 0.2120
  0.9  0.00480 0.2093
  1.0  0.00096 0.2066
  1.4  0.00000 0.1764
  1.6  0.00000 0.1372
  1.8  0.00000 0.1080
  2.2  0.00000 0.0600
  2.8  0.00000 0.0120
    </tableData>
  </table>
-->

<!-- multiply by 2.8/0.3-6.0 :
     - cut 10 at 0.5, then patch X 0.3 until 1.0 (deceleration at landing).
     - split 30 until 1.4, then patch X 6.0 from 1.8 (J = 1.7 in climb, 1.8 in cruise) until 2.0.
     - spread 1.0-2.0 to 1.0-2.8, because max RPM goes beyond 2900.

     Above : 220 kt at 20000 ft, 197 kt at 25000 ft (full load, min pitch with stable RPM).
     But with C_POWER X 1, consumption is too low and cruise spreads between 1500-3000 RPM .
-->

<!--
  C_THRUST   15 2
       10      30
  0.0  0.20966 0.2621
  0.1  0.20765 0.2609
  0.2  0.20363 0.2596
  0.3  0.20362 0.2583
  0.4  0.18550 0.2570
  0.5  0.16531 0.2556
  0.6  0.01512 0.2542
  0.7  0.01176 0.2356
  0.8  0.00864 0.2120
  0.9  0.00480 0.2093
  1.0  0.00096 0.2066
  1.4  0.00000 0.1764
  1.8  0.00000 0.1372
  2.2  0.00000 0.1200
  2.8  0.00000 0.0240
-->

<!-- multiply by 2.8/1.0-6.0 :
     - cut 10 at 0.5, then patch X 1.0 until 1.0 (deceleration at landing).
     - split 30 until 1.4, then patch X 6.0 from 1.8 (J = 1.7 in climb, 1.8 in cruise) until 2.0.
     - spread 1.0-2.0 to 1.0-2.8, because max RPM goes beyond 2900.

     Above : 220 kt at 20000 ft, 197 kt at 25000 ft (full load, min pitch with stable RPM).
     But not enough deceleration at landing.
-->

<!--
  C_THRUST   15 2
       10      30
  0.0  0.20966 0.2621
  0.1  0.20765 0.2609
  0.2  0.20363 0.2596
  0.3  0.20362 0.2583
  0.4  0.18550 0.2570
  0.5  0.16531 0.2556
  0.6  0.05040 0.2542
  0.7  0.03920 0.2356
  0.8  0.02880 0.2120
  0.9  0.01600 0.2093
  1.0  0.00320 0.2066
  1.4  0.00000 0.1764
  1.8  0.00000 0.1372
  2.2  0.00000 0.1200
  2.8  0.00000 0.0240
-->

<!-- multiply by 2.3/1.0-6.0 :
     - cut 10 at 0.5, then patch X 1.0 until 1.0 (deceleration at landing).
     - split 30 until 1.4, then patch X 6.0 from 1.8 (J = 1.7 in climb, 1.8 in cruise) until 2.0.
     - spread 1.0-2.0 to 1.0-2.8, because max RPM goes beyond 2900.

     Ceiling too low : 19000 ft (full load).
-->

<!--
  C_THRUST   14 2
       10      30
  0.0  0.17222 0.2153
  0.1  0.17057 0.2143
  0.2  0.16891 0.2132
  0.3  0.16726 0.2122
  0.4  0.15238 0.2111
  0.5  0.13579 0.2101
  0.6  0.05040 0.2091
  0.7  0.03920 0.1998
  0.8  0.02880 0.1904
  0.9  0.01600 0.1801
  1.0  0.00320 0.1697
  1.4  0.00000 0.1449
  2.2  0.00000 0.1200
  2.8  0.00000 0.0240
-->

<!-- multiply by 6.0, cut 10 at 1.0, split 30 to 2.0 : above 220 kt at 20000 ft full load,
                                                       max pitch required for landing.
-->

<!--
  C_THRUST   16 2
       10      30
  0.0  0.44928 0.5616
  0.1  0.44496 0.5589
  0.2  0.44064 0.5562
  0.3  0.43632 0.5535
  0.4  0.39750 0.5508
  0.5  0.35424 0.5481
  0.6  0.30240 0.5454
  0.7  0.23520 0.5211
  0.8  0.17280 0.4968
  0.9  0.09600 0.4698
  1.0  0.01920 0.4428
  1.2  0.00000 0.3780
  1.4  0.00000 0.2940
  1.6  0.00000 0.2160
  1.8  0.00000 0.1200
  2.0  0.00000 0.0240
-->

<!-- multiply by 3.0, cut 10 at 1.0, split 30 to 2.0 : above 200 kt at 20000 ft full load.
-->

<!--
  C_THRUST   16 2
       10      30
  0.0  0.22464 0.2808
  0.1  0.22248 0.2795
  0.2  0.22032 0.2781
  0.3  0.21816 0.2768
  0.4  0.19875 0.2754
  0.5  0.17712 0.2241
  0.6  0.15120 0.2727
  0.7  0.11760 0.2606
  0.8  0.08640 0.2484
  0.9  0.04800 0.2349
  1.0  0.00960 0.2214
  1.2  0.00000 0.1890
  1.4  0.00000 0.1470
  1.6  0.00000 0.1080
  1.8  0.00000 0.0600
  2.0  0.00000 0.0120
-->

<!-- multiply by 2.8, cut 10 at 1.0, split 30 to 2.0.
-->

<!--
  C_THRUST   16 2
       10      30
  0.0  0.20966 0.2621
  0.1  0.20765 0.2609
  0.2  0.20363 0.2596
  0.3  0.20362 0.2583
  0.4  0.18550 0.2570
  0.5  0.16531 0.2556
  0.6  0.14112 0.2542
  0.7  0.10976 0.2356
  0.8  0.08064 0.2120
  0.9  0.04480 0.2093
  1.0  0.00896 0.2066
  1.2  0.00000 0.1764
  1.4  0.00000 0.1372
  1.6  0.00000 0.1008
  1.8  0.00000 0.0560
  2.0  0.00000 0.0112
-->

<!-- multiply by 2.3, cut 10 at 1.0, split 30 to 2.0.
-->

<!--
  C_THRUST   16 2
       10      30
  0.0  0.17222 0.2153
  0.1  0.17057 0.2143
  0.2  0.16891 0.2132
  0.3  0.16726 0.2122
  0.4  0.15238 0.2111
  0.5  0.13579 0.2101
  0.6  0.11592 0.2091
  0.7  0.09016 0.1998
  0.8  0.06624 0.1904
  0.9  0.03680 0.1801
  1.0  0.00736 0.1697
  1.2  0.00000 0.1449
  1.4  0.00000 0.1127
  1.6  0.00000 0.0828
  1.8  0.00000 0.0460
  2.0  0.00000 0.0092
-->

<!-- multiply by 0.3 : for patching -->

<!--
  C_THRUST   5 1
       10
  0.6  0.01512
  0.7  0.01176
  0.8  0.00864
  0.9  0.00480
  1.0  0.00096
-->


<!-- multiply by 2.0, cut 10 at 1.0, split 30 to 2.0 :

     - reduce the power available at take off.
     - narrow around 2500-2900 RPM in cruise to increase consumption.
-->

<!--
  <table name="C_POWER" type="internal">
    <tableData>
       10      30
  0.0  0.04574 0.20790
  0.1  0.04504 0.20632
  0.2  0.04434 0.20474
  0.3  0.04296 0.20317
  0.4  0.04158 0.20160
  0.5  0.04018 0.19845
  0.6  0.03810 0.19530
  0.7  0.03326 0.19215
  0.8  0.02632 0.18900
  0.9  0.01732 0.18585
  1.0  0.00692 0.18270
  1.2  0.00000 0.17324
  1.4  0.00000 0.15120
  1.6  0.00000 0.11970
  1.8  0.00000 0.07874
  2.0  0.00000 0.03150
    </tableData>
  </table>
-->

<!-- multiply by 1.0, cut 10 at 1.0, split 30 to 2.8 (template). -->

<!--
  C_POWER   16 2
       10      30
  0.0  0.02287 0.10395
  0.1  0.02252 0.10316
  0.2  0.02217 0.10237
  0.3  0.02148 0.10159
  0.4  0.02079 0.10080
  0.5  0.02009 0.09923
  0.6  0.01905 0.09765
  0.7  0.01663 0.09608
  0.8  0.01316 0.09450
  0.9  0.00866 0.09293
  1.0  0.00346 0.09135
  1.4  0.00000 0.08662
  1.8  0.00000 0.07560
  2.2  0.00000 0.05985
  2.5  0.00000 0.03937
  2.8  0.00000 0.01575
-->


<!-- ==== backup of gear ratio 1.0 ==== -->

<!-- multiply by 0.35 : cannot reach 220 kt at 20000 ft -->

<!--
  C_THRUST   11 2
       10      30
  0.0  0.02621 0.03276
  0.1  0.02596 0.03245
  0.2  0.02570 0.03213
  0.3  0.02545 0.03182
  0.4  0.02319 0.02898
  0.5  0.02066 0.02583
  0.6  0.01764 0.02205
  0.7  0.01372 0.01715
  0.8  0.01008 0.01260
  0.9  0.00560 0.00700
  1.0  0.00112 0.00140
-->

<!-- multiply by 0.1 -->

<!--
  C_POWER   11 2
       10      30
  0.0  0.002287 0.010395
  0.1  0.002252 0.010237
  0.2  0.002217 0.010080
  0.3  0.002148 0.009765
  0.4  0.002079 0.009450
  0.5  0.002009 0.009135
  0.6  0.001905 0.008662
  0.7  0.001663 0.007560
  0.8  0.001316 0.005985
  0.9  0.000866 0.003937
  1.0  0.000346 0.001575
-->


<!-- ==== backup of aeromatic tables ==== -->

<!--
  C_THRUST   11 2
       10      30
  0.0  0.07488 0.0936
  0.1  0.07416 0.0927
  0.2  0.07344 0.0918
  0.3  0.07272 0.0909
  0.4  0.06625 0.0828
  0.5  0.05904 0.0738
  0.6  0.05040 0.0630
  0.7  0.03920 0.0490
  0.8  0.02880 0.0360
  0.9  0.01600 0.0200
  1.0  0.00320 0.0040

  C_POWER   11 2
       10      30
  0.0  0.02287 0.10395
  0.1  0.02252 0.10237
  0.2  0.02217 0.10080
  0.3  0.02148 0.09765
  0.4  0.02079 0.09450
  0.5  0.02009 0.09135
  0.6  0.01905 0.08662
  0.7  0.01663 0.07560
  0.8  0.01316 0.05985
  0.9  0.00866 0.03937
  1.0  0.00346 0.01575
-->

</propeller>
